# Исходные | данные
ПЗ - 90  # Красовский
a := 6378136.0  # м
aкр := 6378245.0  # м
e2 := 6.69436619310*10^-3
e2кр := 0.00669342
# Параметры ориентировки эллипсоида Красовского относительно ПЗ-90
x_p := 0.25/206265.8068 = 1.21203e-6
y_p := 0.315/206265.8068 = 1.52716e-6
ω_x := 0.0/206265.8068 = 0
T_x := 25.0
ω_y := 0.35/206265.8068 = 1.69684e-6
T_y := -130.94
ω_z := 0.66/206265.8068 = 3.19975e-6
T_z := -81.76
# 7 | Вариант
B := (49 + 26/60 + 21.33/3600)/57.29577951 = 0.862878
L := (27 + 49/60 + 17.68/3600)/57.29577951 = 0.485578
H := 969453  # м
S := (12 + 09/60 + 20.24/3600)*15/57.29577951 = 3.18233
α := (14 + 51/60 + 44.77/3600)*15/57.29577951 = 3.89098
δ := (57 + 50/60 + 14.91/3600)/57.29577951 = 1.00945
ρ := 990603  # м
N := a/sqrt(1 - e2*sin(B)^2) = 6390494
[X; Y; Z] := [(N + H)*cos(B)*cos(L); (N + H)*cos(B)*sin(L); (N*(1 - e2) + H)*sin(B)] = [4232616; 2233643; 5558976]
t' := (α + 360/57.29577951) - S = 6.99183
[X'_G; Y'_G; Z'_G] := [ρ*cos(δ)*cos(t'); ρ*cos(δ)*sin(t'); ρ*sin(δ)] = [400366; 343182; 838587]
Pol(t) := [1, 0, x_p; 0, 1, -y_p; -x_p, y_p, 1]
[X'; Y'; Z'] := [1, 0, x_p; 0, 1, -y_p; -x_p, y_p, 1]*[X'_G; Y'_G; Z'_G] = [400367; 343181; 838587]
[X'_ПЗ90; Y'_ПЗ90; Z'_ПЗ90] := [X; Y; Z] - [X'; Y'; Z'] = [3832249; 1890462; 4720389]
[X'_СК95; Y'_СК95; Z'_СК95] := [X'_ПЗ90; Y'_ПЗ90; Z'_ПЗ90] + [T_x; T_y; T_z] + [0, ω_z, -ω_y; -ω_z, 0, ω_x; ω_y, -ω_z, 0]*[X'_ПЗ90; Y'_ПЗ90; Z'_ПЗ90] = [3832272; 1890319; 4720308]
L_СК95 := atan(Y'_СК95/X'_СК95) = 0.458244
r := sqrt(X'_СК95^2 + Y'_СК95^2) = 4273127
B0 := atan(Z'_СК95/r) = 0.83508
N0 := aкр/sqrt(1 - e2кр*sin(B0)^2) = 6390009
B1 := atan((Z'_СК95 + N0*e2кр*sin(B0))/r) = 0.83841
ξ1 := B1 - B0 = 0.00332984
N1 := aкр/sqrt(1 - e2кр*sin(B1)^2) = 6390080
B2 := atan((Z'_СК95 + N1*e2кр*sin(B1))/r) = 0.83842
ξ2 := B2 - B1 = 1.00189e-5
N2 := aкр/sqrt(1 - e2кр*sin(B2)^2) = 6390081
B3 := atan((Z'_СК95 + N2*e2кр*sin(B2))/r) = 0.83842
ξ3 := B3 - B2 = 3.00896e-8
N3 := aкр/sqrt(1 - e2кр*sin(B3)^2) = 6390081
H := Z'_СК95/sin(B3) - N3*(1 - e2кр) = 708.77
Bк := B3*57.29577951 = 48.0379
Lк := L_СК95*57.29577951 = 26.2554
Bгр := 48
Lгр := 26
Bмин := 0.03793589*60 = 2.27615
Lмин := 0.25542958*60 = 15.3258
Bсек := 0.2761534*60 = 16.5692
Lсек := 0.3257748*60 = 19.5465
